** ============================================================
** Calculix input — Wing shell under aerodynamic traction
** Source: MappedTraction.xdmf
** Units : mm, MPa, N
** ============================================================

*NODE, NSET=ALL_NODES
1, 2.499403e+00, 3.000000e+00, -2.442489e-02
2, 2.000000e+00, 3.000000e+00, 1.104230e-16
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
*ELEMENT, TYPE=S3, ELSET=WING
1, 1, 160, 5
2, 160, 239, 5
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
*NSET, NSET=ROOT
3, 4, 83, 84, 85, 86
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
*MATERIAL, NAME=STEEL
*ELASTIC
210000000000.0, 0.3

*SHELL SECTION, ELSET=WING, MATERIAL=STEEL
0.01

*STEP
*STATIC

*BOUNDARY
ROOT, 1, 6, 0.0

** Aerodynamic nodal forces (traction * lumped area)
*CLOAD
1, 1, -4.379810e+00
1, 2, 9.887690e-01
1, 3, 6.786833e-01
2, 1, 1.939907e+01
2, 2, -1.298628e+01
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3280, 3, -1.010838e+01

*NODE FILE
U, RF

*EL FILE
S, E

*NODE PRINT, NSET=ALL_NODES
U

*END STEP
