** ============================================================
** Calculix input - Wing shell under aerodynamic traction
** Source: MappedTraction.xdmf
** Element type : S6
** Thickness    : 1.0 mm
** Units        : SI (m, Pa, N)
** ============================================================

*NODE, NSET=ALL_NODES
1, 2.4994030000e+00, 3.0000000000e+00, -2.4424885000e-02
2, 2.0000000000e+00, 3.0000000000e+00, 1.1042300860e-16
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
*ELEMENT, TYPE=S6, ELSET=WING
1, 1, 398, 3, 1920, 1921, 42
2, 398, 399, 3, 1922, 1923, 1921
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
*NSET, NSET=ROOT
82, 83, 84, 85, 86, 87
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
*MATERIAL, NAME=STEEL
*ELASTIC
2.100000e+11, 0.3

*SHELL SECTION, ELSET=WING, MATERIAL=STEEL
1.000000e-03

*STEP
*STATIC

** Clamped BC at wing root
*BOUNDARY
ROOT, 1, 6, 0.0

** Aerodynamic nodal forces (traction * lumped area) in N
*CLOAD
1, 1, 2.9099505689e+00
1, 2, 4.3737792930e+00
1, 3, 5.4599256294e+00
2, 1, 3.0791966418e+00
2, 2, -4.3378081205e+00
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12960, 3, -2.5882734457e+01

*NODE FILE
U, RF

*EL FILE
S, E

*NODE PRINT, NSET=ALL_NODES
U

*END STEP
