GRAPH = VRAI;
SMALL = 1.E-5;
OPTI 'DIME' 3 'ELEM' TRI3;

CER0 = CERC 50 'ROTA' 360. (5. 0. 0.) (0. 0. 0.) (0. 0. 1.) ELIM;
CYL0 = CER0 TRANSLATION 50 (0. 0. 5.);

THICKNESS = 1E-3;
YOUNG     = 210.E9;
NU        = 0.3;

WMOD = MODE CYL0 'MECANIQUE' 'ELASTIQUE' 'DST';
WMAT = MATE WMOD 'YOUN' YOUNG 'NU' NU 'EPAI' THICKNESS;

ROOT0 = BLOQ 'DEPL' CER0;

RIG0 = RIGI WMOD WMAT;
KK = RIG0 ET ROOT_BLOQ;

MOP = 'MODE' CYL0 'CHARGEMENT' 'PRESSION' COQ2;
